!--- OpenDSS Linecodes file generated from Show LINECONSTANTS command
!--- Frequency = 60 Hz, Earth resistivity = 100 ohm-m
!--- Earth Model = Deri

New Linecode.601 nphases=3  Units=kft
~ Rmatrix=[0.0644605  |0.0298713  0.0664231  |0.0292931  0.0302672  0.0652108  ]
~ Xmatrix=[0.199303  |0.0911529  0.192864  |0.0735982  0.0832558  0.196826  ]
~ Cmatrix=[2.92938  |-0.888014  3.13949  |-0.375081  -0.701333  2.86474  ]

New Linecode.602 nphases=3  Units=kft
~ Rmatrix=[0.141142  |0.0298713  0.143105  |0.0292931  0.0302672  0.141893  ]
~ Xmatrix=[0.230108  |0.0911529  0.223669  |0.0735982  0.0832558  0.22763  ]
~ Cmatrix=[2.67549  |-0.755277  2.84473  |-0.333084  -0.600406  2.62733  ]

New Linecode.603 nphases=2  Units=kft
~ Rmatrix=[0.251157  |0.0395149  0.252232  ]
~ Xmatrix=[0.257949  |0.0879076  0.256067  ]
~ Cmatrix=[2.34559  |-0.452384  2.36766  ]

New Linecode.604 nphases=3  Units=kft
~ Rmatrix=[0.229925  |0.0177515  0.229925  |0.0177726  0.0177726  0.229967  ]
~ Xmatrix=[0.308801  |0.139692  0.308801  |0.144566  0.147403  0.308758  ]
~ Cmatrix=[2.34559  |-0.452384  2.36766  |-0.520689  -0.570053  2.4401  ]

New Linecode.605 nphases=1  Units=kft
~ Rmatrix=[0.252183  ]
~ Xmatrix=[0.256153  ]
~ Cmatrix=[2.27193  ]
